# MathcadPy Interface Test Worksheet
# Inputs
real_input_test := 0
real_input_with_units_test := 0
string_input_test := "string from python script!"
matrix_input_test := [0, 0; 0, 0]
# Outputs
matrix_output_test := matrix_input_test*10 = [0, 0; 0, 0]
real_output_test := real_input_test*real_input_with_units_test = 0
