# MathcadPy Interface Test Worksheet
# Inputs
real_input_test := 11
real_input_with_units_test := 3 mm
string_input_test := "string from python script!"
matrix_input_test := [1, 2; 3, 4] s
# Outputs
matrix_output_test := matrix_input_test*10 = [10, 20; 30, 40] s
real_output_test := real_input_test*real_input_with_units_test = 0.033 m
