# MathcadPy Interface Units Test Worksheet
# Inputs
real_input_with_units_test := 12067 N*m
# Outputs
real_output_test := real_input_with_units_test = 286354 lb*ft^2/s^2
real_output_test2 := real_input_with_units_test = 12067 N*m
real_output_test3 := real_input_with_units_test = 8.90016 ft*kip
