# MathcadPy Interface Test Worksheet - Matrix Example
# Inputs
input_1 := [1, 3; 2, 4]
input_2 := [1, 0; 0, 1]
constant := 2
# Outputs
output := (input_1 + input_2)^constant = [10, 21; 14, 31]
a := [1, 0 J; 0 N, 10 mm]
output_2 := a = [1, 0 J; 0 N, 0.01 m]
